do 27 nov 2025 12:33:48 CET
;; 1. Based on: run00
;; 2. Description: CeftriaxPro Base Model - One Compartment
;; x1. TEAM2
;; 2025-11-24
$PROBLEM    CeftriaxPro Base Model Development
$INPUT      ID TIME DOSE=AMT RATE CONC=DV CONC_ID BW SEX ALB SCR eGFR
            AGE ETHNI PR DVID EVID
$DATA      dataset.csv IGNORE=@ IGNORE=(CONC_ID.EQ.1)
 ;; ignores rows showing total plasma concentration
$SUBROUTINE ADVAN1 ;; 1-compartment model
            TRANS2 ;; CL,V
$PK
TVCL = THETA(1)
  CL = TVCL * EXP(ETA(1))
 TVV = THETA(2)
   V = TVV * EXP(ETA(2))
   K = CL/V
  S2 = V/1                ;; scale prediction based on DOSE (mmol) and DV (mmol/L)

$THETA  (0,1.16,6.52) ; ; From Telles et al. (1),max range doubled
 (0,10.04,45.04) ; _; From Telles et al. (1),max range doubled
; explore dataset & literature, SAME order as PK
$OMEGA  1  ;         __  ; not yet known, outcome picked for next models
 1  ;        ___  ; not yet known, outcome picked for next models
;; variance covariance matrix for interindividual variability
$SIGMA  1  ;       ____  ; EPS(1) for proportional error, not yet known, outcome picked for next models
;; variance covariance matrix for residual error
$ERROR
IPRED=F
Y=IPRED*(1+EPS(1)) ;; combined: proportional = EPS(1), additive = EPS(2)
W = SQRT((IPRED*SQRT(SIGMA(1,1)))**2)
IRES  = CONC - IPRED
IWRES = IRES / W

$ESTIMATION METHOD=1 INTERACTION ;; FOCE-I
            MAXEVAL=9999 SIG=3 PRINT=5 NOABORT POSTHOC
 ;; second derivatives using -2log(likelihood),blank means sandwich method
$COVARIANCE
 ;; output table for standard outcomes
$TABLE      ID TIME DV EVID PRED IPRED WRES RES CWRES NOPRINT
            ONEHEADER FILE=run00_sdtab
 ;; output table for PK parameters
$TABLE      ID CL V K NOPRINT NOAPPEND ONEHEADER FILE=run00_patab
 ;; output table for categorical covariates
$TABLE      ID SEX ETHNI NOPRINT NOAPPEND ONEHEADER FILE=run00_catab
 ;; output table for continuous covariates
$TABLE      ID BW ALB SCR eGFR AGE NOPRINT NOAPPEND ONEHEADER
            FILE=run00_cotab

NM-TRAN MESSAGES
 WARNINGS AND ERRORS (IF ANY) FOR PROBLEM    1
 (WARNING  2) NM-TRAN INFERS THAT THE DATA ARE POPULATION.
 (WARNING  79) SIGMA IS USED ON THE RIGHT. WITH A SUBSEQUENT RUN, IF AN
 INITIAL ESTIMATE OF A DIAGONAL BLOCK OF SIGMA IS TO BE COMPUTED BY
 NONMEM, THAT BLOCK WILL BE SET TO AN IDENTITY MATRIX DURING THAT
 COMPUTATION. THIS COULD LEAD TO AN ARITHMETIC EXCEPTION.*
 * THE MAXIMUM NUMBER OF WARNINGS OF ONE OR MORE TYPES WAS REACHED.
 IT IS POSSIBLE THAT SOME WARNING MESSAGES WERE SUPPRESSED.
Note: Analytical 2nd Derivatives are constructed in FSUBS but are never used.
      You may insert $ABBR DERIV2=NO after the first $PROB to save FSUBS construction and compilation time

1NONLINEAR MIXED EFFECTS MODEL PROGRAM (NONMEM) VERSION 7.6.0 (nm760)
 ORIGINALLY DEVELOPED BY STUART BEAL, LEWIS SHEINER, AND ALISON BOECKMANN
 CURRENT DEVELOPERS ARE ROBERT BAUER, ICON DEVELOPMENT SOLUTIONS,
 AND ALISON BOECKMANN. IMPLEMENTATION, EFFICIENCY, AND STANDARDIZATION
 PERFORMED BY NOUS INFOSYSTEMS.
 PROBLEM NO.:         1
 CeftriaxPro Base Model Development
 TOT. NO. OF OBS RECS:      496
 TOT. NO. OF INDIVIDUALS:       33
 ONE COMPARTMENT MODEL (ADVAN1)
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 #TBLN:      1
 #METH: First Order Conditional Estimation with Interaction
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
 #TERM:
0MINIMIZATION SUCCESSFUL
 HOWEVER, PROBLEMS OCCURRED WITH THE MINIMIZATION.
 REGARD THE RESULTS OF THE ESTIMATION STEP CAREFULLY, AND ACCEPT THEM ONLY
 AFTER CHECKING THAT THE COVARIANCE STEP PRODUCES REASONABLE OUTPUT.
 NO. OF FUNCTION EVALUATIONS USED:      167
 NO. OF SIG. DIGITS IN FINAL EST.:  3.3

 ETABAR IS THE ARITHMETIC MEAN OF THE ETA-ESTIMATES,
 AND THE P-VALUE IS GIVEN FOR THE NULL HYPOTHESIS THAT THE TRUE MEAN IS 0.

 ETABAR:         4.8140E-04 -4.8108E-04
 SE:             9.0897E-03  9.0837E-03
 N:                      33          33

 P VAL.:         9.5776E-01  9.5776E-01

 ETASHRINKSD(%)  3.3810E+01  3.3832E+01
 ETASHRINKVR(%)  5.6189E+01  5.6218E+01
 EBVSHRINKSD(%)  3.3837E+01  3.3859E+01
 EBVSHRINKVR(%)  5.6225E+01  5.6254E+01
 RELATIVEINF(%)  0.0000E+00  0.0000E+00
 EPSSHRINKSD(%)  8.0652E-01
 EPSSHRINKVR(%)  1.6065E+00


 TOTAL DATA POINTS NORMALLY DISTRIBUTED (N):          496
 N*LOG(2PI) CONSTANT TO OBJECTIVE FUNCTION:    911.58702493903525
 OBJECTIVE FUNCTION VALUE WITHOUT CONSTANT:   -668.32095404136919
 OBJECTIVE FUNCTION VALUE WITH CONSTANT:       243.26607089766605
 REPORTED OBJECTIVE FUNCTION DOES NOT CONTAIN CONSTANT

 TOTAL EFFECTIVE ETAS (NIND*NETA):                            66


 #TERE:
 Elapsed estimation  time in seconds:     0.95
0R MATRIX ALGORITHMICALLY SINGULAR
 AND ALGORITHMICALLY NON-POSITIVE-SEMIDEFINITE
0R MATRIX IS OUTPUT
0COVARIANCE STEP ABORTED
 Elapsed covariance  time in seconds:     0.34
 Elapsed postprocess time in seconds:     0.02

 ********************               FIRST ORDER CONDITIONAL ESTIMATION WITH INTERACTION              ********************
 #OBJT:**************                       MINIMUM VALUE OF OBJECTIVE FUNCTION                      ********************
 #OBJV:********************************************          -668.321       *********************************************

 ********************               FIRST ORDER CONDITIONAL ESTIMATION WITH INTERACTION              ********************
 ********************                             FINAL PARAMETER ESTIMATE                           ********************

 THETA - VECTOR OF FIXED EFFECTS PARAMETERS   *********
         TH 1      TH 2
         3.03E+00  1.02E+01

 OMEGA - COV MATRIX FOR RANDOM EFFECTS - ETAS  ********
         ETA1      ETA2
 ETA1
+        6.22E-03
 ETA2
+        0.00E+00  6.22E-03

 SIGMA - COV MATRIX FOR RANDOM EFFECTS - EPSILONS  ****
         EPS1
 EPS1
+        8.94E-01

 OMEGA - CORR MATRIX FOR RANDOM EFFECTS - ETAS  *******
         ETA1      ETA2
 ETA1
+        7.89E-02
 ETA2
+        0.00E+00  7.89E-02

 SIGMA - CORR MATRIX FOR RANDOM EFFECTS - EPSILONS  ***
         EPS1
 EPS1
+        9.46E-01
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 Elapsed finaloutput time in seconds:     0.03
 #CPUT: Total CPU Time in Seconds,        1.356
