do 27 nov 2025 16:57:52 CET
;; 1. Based on: run00
;; 2. Description: CeftriaxPro Base Model - Two Compartment
;; x1. TEAM2
;; 2025-11-24
$PROBLEM    CeftriaxPro Base Model Development
$INPUT      ID TIME DOSE=AMT RATE CONC=DV CONC_ID BW SEX ALB SCR eGFR
            AGE ETHNI PR DVID EVID
$DATA      dataset.csv IGNORE=@ IGNORE=(CONC_ID.EQ.1)
 ;; ignores rows showing total plasma concentration
$SUBROUTINE ADVAN3 ;; 2-compartment model
            TRANS4 ;; CL,V1,V2,Q
$PK
TVCL = THETA(1)
  CL = TVCL * EXP(ETA(1))
TVV1 = THETA(2)
  V1 = TVV1 * EXP(ETA(2))
TVV2 = THETA(3)
  V2 = TVV2 * EXP(ETA(3))
 TVQ = THETA(4)
   Q = TVQ  * EXP(ETA(4))
   K = CL/V1
 K12 = Q/V1
 K21 = Q/V2
  S2 = V1/1                ;; scale prediction based on DOSE (mmol) and DV (mmol/L)

$ERROR
IPRED=F
Y=IPRED*(1+EPS(1)) ;;proportional = EPS(1)
W = SQRT((IPRED*SQRT(SIGMA(1,1)))**2)
IRES  = CONC - IPRED
IWRES = IRES / W

$THETA  (0,1.16,3.26) ; ; From Telles et al. (1),max range doubled
 (0,10.04,22.52) ; _; From Telles et al. (1),max range doubled
 (0,9.54,38.16) ; __; From Simon et al. (2),upper bound = initial value x4 to account for ...
 (0,10.8,44.32) ; ___; ... physiological differences
; explore dataset & literature, SAME order as PK
$OMEGA  0.00938  ;       ____  ; taken from run00
 0.00306  ;      _____  ; taken from run00
 1
 1
;; variance covariance matrix for interindividual variability
$SIGMA  0.1
;; variance covariance matrix for residual error
$ESTIMATION METHOD=1 INTERACTION ;; FOCE-I
            MAXEVAL=9999 SIG=3 PRINT=5 NOABORT POSTHOC
 ;; second derivatives using -2log(likelihood),blank means sandwich method
$COVARIANCE
 ;; output table
$TABLE      ID TIME DV DVID EVID PRED IPRED IWRES IRES WRES RES CWRES
            CL V1 V2 Q K K12 K21 SEX ETHNI BW ALB SCR eGFR AGE NOPRINT
            ONEHEADER FILE=run01

NM-TRAN MESSAGES
 WARNINGS AND ERRORS (IF ANY) FOR PROBLEM    1
 (WARNING  2) NM-TRAN INFERS THAT THE DATA ARE POPULATION.
 (WARNING  79) SIGMA IS USED ON THE RIGHT. WITH A SUBSEQUENT RUN, IF AN
 INITIAL ESTIMATE OF A DIAGONAL BLOCK OF SIGMA IS TO BE COMPUTED BY
 NONMEM, THAT BLOCK WILL BE SET TO AN IDENTITY MATRIX DURING THAT
 COMPUTATION. THIS COULD LEAD TO AN ARITHMETIC EXCEPTION.*
 * THE MAXIMUM NUMBER OF WARNINGS OF ONE OR MORE TYPES WAS REACHED.
 IT IS POSSIBLE THAT SOME WARNING MESSAGES WERE SUPPRESSED.
Note: Analytical 2nd Derivatives are constructed in FSUBS but are never used.
      You may insert $ABBR DERIV2=NO after the first $PROB to save FSUBS construction and compilation time

1NONLINEAR MIXED EFFECTS MODEL PROGRAM (NONMEM) VERSION 7.6.0 (nm760)
 ORIGINALLY DEVELOPED BY STUART BEAL, LEWIS SHEINER, AND ALISON BOECKMANN
 CURRENT DEVELOPERS ARE ROBERT BAUER, ICON DEVELOPMENT SOLUTIONS,
 AND ALISON BOECKMANN. IMPLEMENTATION, EFFICIENCY, AND STANDARDIZATION
 PERFORMED BY NOUS INFOSYSTEMS.
 PROBLEM NO.:         1
 CeftriaxPro Base Model Development
 TOT. NO. OF OBS RECS:      496
 TOT. NO. OF INDIVIDUALS:       33
 TWO COMPARTMENT MODEL (ADVAN3)
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 #TBLN:      1
 #METH: First Order Conditional Estimation with Interaction
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
 #TERM:
0MINIMIZATION TERMINATED
 DUE TO PROXIMITY OF LAST ITERATION EST. TO A VALUE
 AT WHICH THE OBJ. FUNC. IS INFINITE (ERROR=136)
0AT THE LAST COMPUTED INFINITE VALUE OF THE OBJ. FUNCT.:

0PRED EXIT CODE = 1
0INDIVIDUAL NO.      20   ID= 2.00000000000000E+01   (WITHIN-INDIVIDUAL) DATA REC NO.   2
 THETA=
  1.11E+00   1.04E+01   6.91E+00   1.36E+01
 ETA=
  8.69E-01  -4.22E-01   1.10E+01   2.87E+01
 A ROOT OF THE CHARACTERISTIC EQUATION IS ZERO BECAUSE
 K*K21 IS MUCH SMALLER THAN  (K+K12+K21)**2.
 PERHAPS K OR K21 IS VERY SMALL, OR K12 IS VERY LARGE.

 NO. OF FUNCTION EVALUATIONS USED:      776
 NO. OF SIG. DIGITS UNREPORTABLE

 ETABAR IS THE ARITHMETIC MEAN OF THE ETA-ESTIMATES,
 AND THE P-VALUE IS GIVEN FOR THE NULL HYPOTHESIS THAT THE TRUE MEAN IS 0.

 ETABAR:         1.2942E-03 -2.0862E-03  6.5453E+00  6.2062E+00
 SE:             9.0644E-05  4.3170E-05  6.8033E-02  2.1699E-01
 N:                      33          33          33          33

 P VAL.:         3.1263E-46  0.0000E+00  0.0000E+00  7.305E-180

 ETASHRINKSD(%)  9.8549E+01  9.6844E+01  4.6505E+00  1.0000E-10
 ETASHRINKVR(%)  9.9979E+01  9.9900E+01  9.0847E+00  1.0000E-10
 EBVSHRINKSD(%)  9.9500E+01  9.8454E+01  3.3119E-02  2.2276E+00
 EBVSHRINKVR(%)  9.9998E+01  9.9976E+01  6.6227E-02  4.4056E+00
 RELATIVEINF(%)  1.1220E-10  0.0000E+00  5.7414E-07  3.9175E-07
 EPSSHRINKSD(%)  1.0480E+01
 EPSSHRINKVR(%)  1.9861E+01


 TOTAL DATA POINTS NORMALLY DISTRIBUTED (N):          496
 N*LOG(2PI) CONSTANT TO OBJECTIVE FUNCTION:    911.58702493903525
 OBJECTIVE FUNCTION VALUE WITHOUT CONSTANT:   -2681.9952841118115
 OBJECTIVE FUNCTION VALUE WITH CONSTANT:      -1770.4082591727763
 REPORTED OBJECTIVE FUNCTION DOES NOT CONTAIN CONSTANT

 TOTAL EFFECTIVE ETAS (NIND*NETA):                           132


 #TERE:
 Elapsed estimation  time in seconds:    14.37
 Elapsed postprocess time in seconds:     0.04

 ********************               FIRST ORDER CONDITIONAL ESTIMATION WITH INTERACTION              ********************
 #OBJT:**************                       MINIMUM VALUE OF OBJECTIVE FUNCTION                      ********************
 #OBJV:********************************************         -2681.995       *********************************************

 ********************               FIRST ORDER CONDITIONAL ESTIMATION WITH INTERACTION              ********************
 ********************                             FINAL PARAMETER ESTIMATE                           ********************

 THETA - VECTOR OF FIXED EFFECTS PARAMETERS   *********
         TH 1      TH 2      TH 3      TH 4
         1.11E+00  1.04E+01  6.91E+00  1.36E+01

 OMEGA - COV MATRIX FOR RANDOM EFFECTS - ETAS  ********
         ETA1      ETA2      ETA3      ETA4
 ETA1
+        9.24E-03
 ETA2
+        0.00E+00  4.43E-03
 ETA3
+        0.00E+00  0.00E+00  4.73E+01
 ETA4
+        0.00E+00  0.00E+00  0.00E+00  3.23E+01

 SIGMA - COV MATRIX FOR RANDOM EFFECTS - EPSILONS  ****
         EPS1
 EPS1
+        1.10E+00

 OMEGA - CORR MATRIX FOR RANDOM EFFECTS - ETAS  *******
         ETA1      ETA2      ETA3      ETA4
 ETA1
+        9.61E-02
 ETA2
+        0.00E+00  6.66E-02
 ETA3
+        0.00E+00  0.00E+00  6.88E+00
 ETA4
+        0.00E+00  0.00E+00  0.00E+00  5.68E+00

 SIGMA - CORR MATRIX FOR RANDOM EFFECTS - EPSILONS  ***
         EPS1
 EPS1
+        1.05E+00
 Elapsed finaloutput time in seconds:     0.02
 #CPUT: Total CPU Time in Seconds,       14.340
