wo 26 nov 2025 10:17:05 CET
;; 1. Based on: run00
;; 2. Description: CeftriaxPro Base Model, eGFR ~ CL
;; x1. TEAM2
;; 2025-11-24
$PROBLEM    CeftriaxPro Base Model Development
$INPUT      ID TIME DOSE=AMT RATE CONC=DV CONC_ID BW SEX ALB SCR eGFR
            AGE ETHNI PR DVID EVID
$DATA      dataset.csv IGNORE=@
$SUBROUTINE ADVAN3 ;; 2-compartment model
            TRANS4 ;; CL,V1,V2,Q
$PK
TVCL = THETA(1)
  CL = TVCL * EXP(THETA(2) * (eGFR - 96.5)/96.5) * EXP(ETA(1)); THETA(2): describes covariate effect
TVV1 = THETA(3)
  V1 = TVV1 * EXP(ETA(2))
TVV2 = THETA(4)
  V2 = TVV2 * EXP(ETA(3))
 TVQ = THETA(5)
   Q = TVQ  * EXP(ETA(4))
   K = CL/V1
 K12 = Q/V1
 K21 = Q/V2
  S2 = V1/1                ;; scale prediction based on DOSE (mmol) and DV (mmol/L)

$ERROR
IPRED=F
Y=IPRED*(1+EPS(1))+EPS(2);; combined: proportional = EPS(1), additive = EPS(2)

$THETA  (0,1.16,3.26) ; ; From Telles et al. (1)
 (0,1) ; _; covariate effect eGFR ~ CL
 (0,10.04,22.52) ; __; From Telles et al. (1)
 (0,1,99)
 (0,1,99)
; explore dataset & literature, SAME order as PK
$OMEGA  0.1
 0.1
 0.1
 0.1
;; variance covariance matrix for interindividual variability
$SIGMA  0.1
 0.1
;; variance covariance matrix for residual error
 ;; estimation step
$ESTIMATION METHOD=1 ;; FOCE
            INTERACTION MAXEVALS=9999 PRINT=5
 ;; second derivatives using -2log(likelihood),blank means sandwich method
$COVARIANCE
 ;; output table
$TABLE      ID TIME DV DVID EVID PRED IPRED WRES RES CWRES CL V1 V2 Q
            K K12 K21 SEX ETHNI BW ALB SCR eGFR AGE NOPRINT ONEHEADER
            FILE=run02

NM-TRAN MESSAGES
 WARNINGS AND ERRORS (IF ANY) FOR PROBLEM    1
 (WARNING  2) NM-TRAN INFERS THAT THE DATA ARE POPULATION.
Note: Analytical 2nd Derivatives are constructed in FSUBS but are never used.
      You may insert $ABBR DERIV2=NO after the first $PROB to save FSUBS construction and compilation time

1NONLINEAR MIXED EFFECTS MODEL PROGRAM (NONMEM) VERSION 7.6.0 (nm760)
 ORIGINALLY DEVELOPED BY STUART BEAL, LEWIS SHEINER, AND ALISON BOECKMANN
 CURRENT DEVELOPERS ARE ROBERT BAUER, ICON DEVELOPMENT SOLUTIONS,
 AND ALISON BOECKMANN. IMPLEMENTATION, EFFICIENCY, AND STANDARDIZATION
 PERFORMED BY NOUS INFOSYSTEMS.
 PROBLEM NO.:         1
 CeftriaxPro Base Model Development
 TOT. NO. OF OBS RECS:      992
 TOT. NO. OF INDIVIDUALS:       33
 TWO COMPARTMENT MODEL (ADVAN3)
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 #TBLN:      1
 #METH: First Order Conditional Estimation with Interaction
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
 #TERM:
0MINIMIZATION TERMINATED
 DUE TO PROXIMITY OF NEXT ITERATION EST. TO A VALUE
 AT WHICH THE OBJ. FUNC. IS INFINITE
0AT THE LAST COMPUTED INFINITE VALUE OF THE OBJ. FUNCT.:
 ERROR IN NCONTR WITH INDIVIDUAL      13   ID= 1.30000000000000E+01
 NUMERICAL HESSIAN OF OBJ. FUNC. FOR COMPUTING CONDITIONAL ESTIMATE
 IS NON POSITIVE DEFINITE
 THETA=
  1.98E-01   3.55E-01   1.00E-01   2.86E+00   9.80E+01

 NO. OF FUNCTION EVALUATIONS USED:      509
 NO. OF SIG. DIGITS UNREPORTABLE
0PARAMETER ESTIMATE IS NEAR ITS BOUNDARY

 ETABAR IS THE ARITHMETIC MEAN OF THE ETA-ESTIMATES,
 AND THE P-VALUE IS GIVEN FOR THE NULL HYPOTHESIS THAT THE TRUE MEAN IS 0.

 ETABAR:         4.9558E-03  6.2870E-03 -8.1500E-03 -9.9971E-07
 SE:             4.4748E-02  1.8151E-02  2.5163E-02  5.8082E-07
 N:                      33          33          33          33

 P VAL.:         9.1181E-01  7.2906E-01  7.4603E-01  8.5212E-02

 ETASHRINKSD(%)  1.4387E+01  3.8422E+01  3.3206E+01  9.9890E+01
 ETASHRINKVR(%)  2.6704E+01  6.2082E+01  5.5386E+01  1.0000E+02
 EBVSHRINKSD(%)  1.3014E+01  3.8384E+01  3.3122E+01  9.9895E+01
 EBVSHRINKVR(%)  2.4335E+01  6.2034E+01  5.5273E+01  1.0000E+02
 RELATIVEINF(%)  1.0000E-10  1.0000E-10  1.0000E-10  1.0000E-10
 EPSSHRINKSD(%)  1.2047E+00  1.2047E+00
 EPSSHRINKVR(%)  2.3950E+00  2.3950E+00


 TOTAL DATA POINTS NORMALLY DISTRIBUTED (N):          992
 N*LOG(2PI) CONSTANT TO OBJECTIVE FUNCTION:    1823.1740498780705
 OBJECTIVE FUNCTION VALUE WITHOUT CONSTANT:   -4211.2722370954989
 OBJECTIVE FUNCTION VALUE WITH CONSTANT:      -2388.0981872174284
 REPORTED OBJECTIVE FUNCTION DOES NOT CONTAIN CONSTANT

 TOTAL EFFECTIVE ETAS (NIND*NETA):                           132


 #TERE:
 Elapsed estimation  time in seconds:    12.36
 Elapsed postprocess time in seconds:     0.06

 ********************               FIRST ORDER CONDITIONAL ESTIMATION WITH INTERACTION              ********************
 #OBJT:**************                       MINIMUM VALUE OF OBJECTIVE FUNCTION                      ********************
 #OBJV:********************************************         -4211.272       *********************************************

 ********************               FIRST ORDER CONDITIONAL ESTIMATION WITH INTERACTION              ********************
 ********************                             FINAL PARAMETER ESTIMATE                           ********************

 THETA - VECTOR OF FIXED EFFECTS PARAMETERS   *********
         TH 1      TH 2      TH 3      TH 4      TH 5
         1.98E-01  3.57E-01  1.00E-01  2.87E+00  9.80E+01

 OMEGA - COV MATRIX FOR RANDOM EFFECTS - ETAS  ********
         ETA1      ETA2      ETA3      ETA4
 ETA1
+        9.02E-02
 ETA2
+        0.00E+00  2.88E-02
 ETA3
+        0.00E+00  0.00E+00  4.70E-02
 ETA4
+        0.00E+00  0.00E+00  0.00E+00  1.00E-05

 SIGMA - COV MATRIX FOR RANDOM EFFECTS - EPSILONS  ****
         EPS1      EPS2
 EPS1
+        6.05E-01
 EPS2
+        0.00E+00  1.68E-05

 OMEGA - CORR MATRIX FOR RANDOM EFFECTS - ETAS  *******
         ETA1      ETA2      ETA3      ETA4
 ETA1
+        3.00E-01
 ETA2
+        0.00E+00  1.70E-01
 ETA3
+        0.00E+00  0.00E+00  2.17E-01
 ETA4
+        0.00E+00  0.00E+00  0.00E+00  3.16E-03

 SIGMA - CORR MATRIX FOR RANDOM EFFECTS - EPSILONS  ***
         EPS1      EPS2
 EPS1
+        7.78E-01
 EPS2
+        0.00E+00  4.10E-03
 Elapsed finaloutput time in seconds:     0.05
 #CPUT: Total CPU Time in Seconds,       12.431
